Wed Jul  9 06:41:14 EDT 2025
$PROBLEM Simple PREDPP model

$INPUT ID=SUBJ X DV

$DATA  pred_data1.csv
$DATA IGN=@

$THETA
.1 ; intercept
1  ; slope

$OMEGA 0.1

$SIGMA .2

$PRED
intercept=THETA(1)+ETA(1)
slope=THETA(2)
Y=intercept+slope*X+EPS(1)

$EST METHOD=1 INTER PRINT=20

$TABLE
slope FILE = pred030_res.txt

NM-TRAN MESSAGES
 WARNINGS AND ERRORS (IF ANY) FOR PROBLEM    1
 (WARNING  2) NM-TRAN INFERS THAT THE DATA ARE POPULATION.
 (WARNING  13) WITH USER-WRITTEN PRED OR $PRED, NM-TRAN CANNOT APPEND THE
 MDV DATA ITEM.
 LIM VALUES MAXLIM ASSESSED BY NMTRAN: 1,2,3,4,5,6,7,8,10,11,13,15,16

1NONLINEAR MIXED EFFECTS MODEL PROGRAM (NONMEM) VERSION 7.5.0
 ORIGINALLY DEVELOPED BY STUART BEAL, LEWIS SHEINER, AND ALISON BOECKMANN
 CURRENT DEVELOPERS ARE ROBERT BAUER, ICON DEVELOPMENT SOLUTIONS,
 AND ALISON BOECKMANN. IMPLEMENTATION, EFFICIENCY, AND STANDARDIZATION
 PERFORMED BY NOUS INFOSYSTEMS.
 PROBLEM NO.:         1
 Simple PREDPP model
 TOT. NO. OF OBS RECS:       30
 TOT. NO. OF INDIVIDUALS:       10
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 #TBLN:      1
 #METH: First Order Conditional Estimation with Interaction
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
 #TERM:
0MINIMIZATION SUCCESSFUL
 NO. OF FUNCTION EVALUATIONS USED:      109
 NO. OF SIG. DIGITS IN FINAL EST.:  3.4

 ETABAR IS THE ARITHMETIC MEAN OF THE ETA-ESTIMATES,
 AND THE P-VALUE IS GIVEN FOR THE NULL HYPOTHESIS THAT THE TRUE MEAN IS 0.

 ETABAR:         1.0088E-03
 SE:             5.2957E-01
 N:                      10

 P VAL.:         9.9848E-01

 ETASHRINKSD(%)  5.3665E+00
 ETASHRINKVR(%)  1.0445E+01
 EBVSHRINKSD(%)  1.0212E+01
 EBVSHRINKVR(%)  1.9381E+01
 RELATIVEINF(%)  8.0619E+01
 EPSSHRINKSD(%)  1.4472E+01
 EPSSHRINKVR(%)  2.6850E+01


 TOTAL DATA POINTS NORMALLY DISTRIBUTED (N):           30
 N*LOG(2PI) CONSTANT TO OBJECTIVE FUNCTION:    55.136311992280362
 OBJECTIVE FUNCTION VALUE WITHOUT CONSTANT:    74.015543861847505
 OBJECTIVE FUNCTION VALUE WITH CONSTANT:       129.15185585412786
 REPORTED OBJECTIVE FUNCTION DOES NOT CONTAIN CONSTANT

 TOTAL EFFECTIVE ETAS (NIND*NETA):                            10


 #TERE:
 Elapsed estimation  time in seconds:     0.01
 Elapsed postprocess time in seconds:     0.00

 ********************               FIRST ORDER CONDITIONAL ESTIMATION WITH INTERACTION              ********************
 #OBJT:**************                       MINIMUM VALUE OF OBJECTIVE FUNCTION                      ********************
 #OBJV:********************************************       74.016       **************************************************

 ********************               FIRST ORDER CONDITIONAL ESTIMATION WITH INTERACTION              ********************
 ********************                             FINAL PARAMETER ESTIMATE                           ********************

 THETA - VECTOR OF FIXED EFFECTS PARAMETERS   *********
         TH 1      TH 2
         3.19E+00 -2.97E-01

 OMEGA - COV MATRIX FOR RANDOM EFFECTS - ETAS  ********
         ETA1
 ETA1
+        3.48E+00

 SIGMA - COV MATRIX FOR RANDOM EFFECTS - EPSILONS  ****
         EPS1
 EPS1
+        2.51E+00

 OMEGA - CORR MATRIX FOR RANDOM EFFECTS - ETAS  *******
         ETA1
 ETA1
+        1.87E+00

 SIGMA - CORR MATRIX FOR RANDOM EFFECTS - EPSILONS  ***
         EPS1
 EPS1
+        1.58E+00
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 Elapsed finaloutput time in seconds:     0.00
 #CPUT: Total CPU Time in Seconds,        0.019
