Mon Jun 30 21:24:56 EDT 2025
$PROBLEM    033 with IOV SAME

$INPUT ROW ID NOMTIME TIME EVID CMT AMT DV FLAG STUDY
BLQ CYCLE DOSE PART PROFDAY PROFTIME WEIGHTB eff0

$DATA      xgxr2.csv IGNORE=@ IGNORE=(FLAG.NE.0) IGNORE(DOSE.LT.30)

$SUBROUTINE ADVAN4 TRANS4

$PK
LTVKA=THETA(1)
LTVV2=THETA(2)
LTVCL=THETA(3)
LTVV3=THETA(4)
LTVQ=THETA(5)

MU_1=LTVKA
KA=EXP(MU_1+ETA(1))
MU_2=LTVV2
V2=EXP(MU_2+ETA(2))
MU_3=LTVCL
CL=EXP(MU_3+ETA(3))
MU_4=LTVV3
V3=EXP(MU_4+ETA(4))
MU_5 = LTVQ
Q =EXP(MU_5+ETA(5))
S2=V2

IOVCL=ETA(6)
IF(TIME.GT.8) IOVCL=ETA(7)
CL=CL+EXP(IOVCL)

$ERROR
  IPRED=F
  IRES=DV-IPRED

  IF (IPRED.GT.1) THEN
    W = SQRT(IPRED**2*SIGMA(1,1) + SIGMA(2,2))
  ELSE
    W=1
  ENDIF

  IWRES=IRES/W
  Y=F+F*ERR(1)+ERR(2)

;-----------------------INITIAL ESTIMATES---------------------------------
$THETA  (.1)             ; LTVKA
$THETA  (3)             ; LTVV2
$THETA  (1)             ; LTVCL
$THETA  (4)             ; LTVV3
$THETA  (-1)             ; LTVQ

$OMEGA 0 FIX
$OMEGA BLOCK (2) 0.1 .01
0.1
$OMEGA 0 FIX
$OMEGA 0 FIX
$OMEGA BLOCK(1)
0.15		; IOV1.KA	; lognormal 	; 6	; IOV		; Between-occasion variability on KA 	; -
$OMEGA BLOCK(1) SAME ; IOV2.KA	; lognormal 	; 7	; IOV		; Between-occasion variability on KA 	; -

$SIGMA 0.1
$SIGMA 0 FIX

;; $ESTIMATION METHOD=1 POSTHOC INTER MAXEVAL=9999 NSIG=2 SIGL=9
;;            PRINT=10 NOABORT MSFO=xgxr057.msf
$ESTIMATION METHOD=SAEM INTERACTION NOABORT NBURN=1000 NITER=1000 CTYPE=3 MAX=99999 NSIG=3 SEED=3442 PRINT=10 RANMETHOD=P MSFO=xgxr057.msf

$ESTIMATION METHOD=IMP INTERACTION EONLY=1 NITER=20 PRINT=1 ISAMPLE=5000 RANMETHOD=P

$COV PRINT=E

$TABLE ROW KA V2 V3 CL Q PRED IPRED Y NOPRINT FILE=xgxr057_res.txt

NM-TRAN MESSAGES
 WARNINGS AND ERRORS (IF ANY) FOR PROBLEM    1
 (WARNING  2) NM-TRAN INFERS THAT THE DATA ARE POPULATION.
 (WARNING  79) SIGMA IS USED ON THE RIGHT. WITH A SUBSEQUENT RUN, IF AN
 INITIAL ESTIMATE OF A DIAGONAL BLOCK OF SIGMA IS TO BE COMPUTED BY
 NONMEM, THAT BLOCK WILL BE SET TO AN IDENTITY MATRIX DURING THAT
 COMPUTATION. THIS COULD LEAD TO AN ARITHMETIC EXCEPTION.*
 * THE MAXIMUM NUMBER OF WARNINGS OF ONE OR MORE TYPES WAS REACHED.
 IT IS POSSIBLE THAT SOME WARNING MESSAGES WERE SUPPRESSED.

1NONLINEAR MIXED EFFECTS MODEL PROGRAM (NONMEM) VERSION 7.5.0
 ORIGINALLY DEVELOPED BY STUART BEAL, LEWIS SHEINER, AND ALISON BOECKMANN
 CURRENT DEVELOPERS ARE ROBERT BAUER, ICON DEVELOPMENT SOLUTIONS,
 AND ALISON BOECKMANN. IMPLEMENTATION, EFFICIENCY, AND STANDARDIZATION
 PERFORMED BY NOUS INFOSYSTEMS.
 PROBLEM NO.:         1
 033 with IOV SAME
 TOT. NO. OF OBS RECS:      641
 TOT. NO. OF INDIVIDUALS:       90
 TWO COMPARTMENT MODEL WITH FIRST-ORDER ABSORPTION (ADVAN4)
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 #TBLN:      1
 #METH: Stochastic Approximation Expectation-Maximization
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
 #TERM:
 STOCHASTIC PORTION WAS COMPLETED
 REDUCED STOCHASTIC PORTION WAS COMPLETED

 ETABAR IS THE ARITHMETIC MEAN OF THE ETA-ESTIMATES,
 AND THE P-VALUE IS GIVEN FOR THE NULL HYPOTHESIS THAT THE TRUE MEAN IS 0.

 ETABAR:         0.0000E+00  9.9974E-06  1.2157E-05  0.0000E+00  0.0000E+00  1.2645E-03 -4.9485E-03
 SE:             0.0000E+00  4.1048E-02  5.2498E-02  0.0000E+00  0.0000E+00  1.6983E-02  1.6718E-02
 N:                       0          90          90           0           0          90          90

 P VAL.:         1.0000E+00  9.9981E-01  9.9982E-01  1.0000E+00  1.0000E+00  9.4065E-01  7.6723E-01

 ETASHRINKSD(%)  0.0000E+00  7.2599E+00  1.1188E+01  0.0000E+00  0.0000E+00  8.1208E+01  8.1500E+01
 ETASHRINKVR(%)  0.0000E+00  1.3993E+01  2.1125E+01  0.0000E+00  0.0000E+00  9.6468E+01  9.6578E+01
 EBVSHRINKSD(%)  0.0000E+00  7.2600E+00  1.1189E+01  0.0000E+00  0.0000E+00  8.4553E+01  7.8633E+01
 EBVSHRINKVR(%)  0.0000E+00  1.3993E+01  2.1126E+01  0.0000E+00  0.0000E+00  9.7614E+01  9.5434E+01
 RELATIVEINF(%)  0.0000E+00  0.0000E+00  0.0000E+00  0.0000E+00  0.0000E+00  2.1549E+00  4.1232E+00
 EPSSHRINKSD(%)  1.2923E+01  1.0000E+02
 EPSSHRINKVR(%)  2.4176E+01  1.0000E+02


 TOTAL DATA POINTS NORMALLY DISTRIBUTED (N):          641
 N*LOG(2PI) CONSTANT TO OBJECTIVE FUNCTION:    1178.0791995683903
 OBJECTIVE FUNCTION VALUE WITHOUT CONSTANT:   -2203.1820454035342
 OBJECTIVE FUNCTION VALUE WITH CONSTANT:      -1025.1028458351439
 REPORTED OBJECTIVE FUNCTION DOES NOT CONTAIN CONSTANT

 TOTAL EFFECTIVE ETAS (NIND*NETA):                           360
 NIND*NETA*LOG(2PI) CONSTANT TO OBJECTIVE FUNCTION:    661.63574390736437
 OBJECTIVE FUNCTION VALUE WITHOUT CONSTANT:   -2203.1820454035342
 OBJECTIVE FUNCTION VALUE WITH CONSTANT:      -1541.5463014961697
 REPORTED OBJECTIVE FUNCTION DOES NOT CONTAIN CONSTANT


 #TERE:
 Elapsed estimation  time in seconds:    81.95
 Elapsed covariance  time in seconds:     0.02

 ********************                STOCHASTIC APPROXIMATION EXPECTATION-MAXIMIZATION               ********************
 #OBJT:**************                        FINAL VALUE OF LIKELIHOOD FUNCTION                      ********************
 #OBJV:********************************************    -2203.182       **************************************************

 ********************                STOCHASTIC APPROXIMATION EXPECTATION-MAXIMIZATION               ********************
 ********************                             FINAL PARAMETER ESTIMATE                           ********************

 THETA - VECTOR OF FIXED EFFECTS PARAMETERS   *********
         TH 1      TH 2      TH 3      TH 4      TH 5
         7.82E-01  4.30E+00  2.44E+00  5.01E+00  2.12E+00

 OMEGA - COV MATRIX FOR RANDOM EFFECTS - ETAS  ********
         ETA1      ETA2      ETA3      ETA4      ETA5      ETA6      ETA7
 ETA1
+        0.00E+00
 ETA2
+        0.00E+00  1.78E-01
 ETA3
+        0.00E+00 -3.25E-02  3.18E-01
 ETA4
+        0.00E+00  0.00E+00  0.00E+00  0.00E+00
 ETA5
+        0.00E+00  0.00E+00  0.00E+00  0.00E+00  0.00E+00
 ETA6
+        0.00E+00  0.00E+00  0.00E+00  0.00E+00  0.00E+00  7.43E-01
 ETA7
+        0.00E+00  0.00E+00  0.00E+00  0.00E+00  0.00E+00  0.00E+00  7.43E-01

 SIGMA - COV MATRIX FOR RANDOM EFFECTS - EPSILONS  ****
         EPS1      EPS2
 EPS1
+        8.04E-02
 EPS2
+        0.00E+00  0.00E+00

 OMEGA - CORR MATRIX FOR RANDOM EFFECTS - ETAS  *******
         ETA1      ETA2      ETA3      ETA4      ETA5      ETA6      ETA7
 ETA1
+        0.00E+00
 ETA2
+        0.00E+00  4.22E-01
 ETA3
+        0.00E+00 -1.37E-01  5.64E-01
 ETA4
+        0.00E+00  0.00E+00  0.00E+00  0.00E+00
 ETA5
+        0.00E+00  0.00E+00  0.00E+00  0.00E+00  0.00E+00
 ETA6
+        0.00E+00  0.00E+00  0.00E+00  0.00E+00  0.00E+00  8.62E-01
 ETA7
+        0.00E+00  0.00E+00  0.00E+00  0.00E+00  0.00E+00  0.00E+00  8.62E-01

 SIGMA - CORR MATRIX FOR RANDOM EFFECTS - EPSILONS  ***
         EPS1      EPS2
 EPS1
+        2.83E-01
 EPS2
+        0.00E+00  0.00E+00

 ********************                STOCHASTIC APPROXIMATION EXPECTATION-MAXIMIZATION               ********************
 ********************                          STANDARD ERROR OF ESTIMATE (S)                        ********************

 THETA - VECTOR OF FIXED EFFECTS PARAMETERS   *********
         TH 1      TH 2      TH 3      TH 4      TH 5
         5.53E-02  5.78E-02  1.33E-01  3.12E-01  9.77E-02

 OMEGA - COV MATRIX FOR RANDOM EFFECTS - ETAS  ********
         ETA1      ETA2      ETA3      ETA4      ETA5      ETA6      ETA7
 ETA1
+        0.00E+00
 ETA2
+        0.00E+00  3.17E-02
 ETA3
+        0.00E+00  4.03E-02  1.07E-01
 ETA4
+        0.00E+00  0.00E+00  0.00E+00  0.00E+00
 ETA5
+        0.00E+00  0.00E+00  0.00E+00  0.00E+00  0.00E+00
 ETA6
+        0.00E+00  0.00E+00  0.00E+00  0.00E+00  0.00E+00  1.11E+00
 ETA7
+        0.00E+00  0.00E+00  0.00E+00  0.00E+00  0.00E+00  0.00E+00  1.11E+00

 SIGMA - COV MATRIX FOR RANDOM EFFECTS - EPSILONS  ****
         EPS1      EPS2
 EPS1
+        6.18E-03
 EPS2
+        0.00E+00  0.00E+00

 OMEGA - CORR MATRIX FOR RANDOM EFFECTS - ETAS  *******
         ETA1      ETA2      ETA3      ETA4      ETA5      ETA6      ETA7
 ETA1
+       .........
 ETA2
+       .........  3.76E-02
 ETA3
+       .........  1.65E-01  9.46E-02
 ETA4
+       ......... ......... ......... .........
 ETA5
+       ......... ......... ......... ......... .........
 ETA6
+       ......... ......... ......... ......... .........  6.46E-01
 ETA7
+       ......... ......... ......... ......... ......... ......... .........

 SIGMA - CORR MATRIX FOR RANDOM EFFECTS - EPSILONS  ***
         EPS1      EPS2
 EPS1
+        1.09E-02
 EPS2
+       ......... .........
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
 ********************                STOCHASTIC APPROXIMATION EXPECTATION-MAXIMIZATION               ********************
 ********************                    EIGENVALUES OF COR MATRIX OF ESTIMATE (S)                   ********************

             1         2         3         4         5         6         7         8         9        10
         8.59E-02  1.47E-01  2.69E-01  4.49E-01  7.76E-01  8.96E-01  1.09E+00  1.29E+00  1.49E+00  3.50E+00
 #TBLN:      2
 #METH: Objective Function Evaluation by Importance Sampling
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
 #TERM:
 EXPECTATION ONLY PROCESS WAS COMPLETED

 ETABAR IS THE ARITHMETIC MEAN OF THE ETA-ESTIMATES,
 AND THE P-VALUE IS GIVEN FOR THE NULL HYPOTHESIS THAT THE TRUE MEAN IS 0.

 ETABAR:         0.0000E+00  2.5346E-03 -1.5397E-03  0.0000E+00  0.0000E+00  4.4566E-03 -2.7098E-03
 SE:             0.0000E+00  4.1018E-02  5.2709E-02  0.0000E+00  0.0000E+00  1.6456E-02  1.7476E-02
 N:                       0          90          90           0           0          90          90

 P VAL.:         1.0000E+00  9.5073E-01  9.7670E-01  1.0000E+00  1.0000E+00  7.8653E-01  8.7678E-01

 ETASHRINKSD(%)  0.0000E+00  7.3273E+00  1.0833E+01  0.0000E+00  0.0000E+00  8.1790E+01  8.0662E+01
 ETASHRINKVR(%)  0.0000E+00  1.4118E+01  2.0492E+01  0.0000E+00  0.0000E+00  9.6684E+01  9.6260E+01
 EBVSHRINKSD(%)  0.0000E+00  7.2380E+00  1.1101E+01  0.0000E+00  0.0000E+00  8.3435E+01  8.1212E+01
 EBVSHRINKVR(%)  0.0000E+00  1.3952E+01  2.0970E+01  0.0000E+00  0.0000E+00  9.7256E+01  9.6470E+01
 RELATIVEINF(%)  0.0000E+00  0.0000E+00  0.0000E+00  0.0000E+00  0.0000E+00  2.3284E+00  2.9952E+00
 EPSSHRINKSD(%)  1.2876E+01  1.0000E+02
 EPSSHRINKVR(%)  2.4093E+01  1.0000E+02


 TOTAL DATA POINTS NORMALLY DISTRIBUTED (N):          641
 N*LOG(2PI) CONSTANT TO OBJECTIVE FUNCTION:    1178.0791995683903
 OBJECTIVE FUNCTION VALUE WITHOUT CONSTANT:   -1725.2998163322245
 OBJECTIVE FUNCTION VALUE WITH CONSTANT:      -547.22061676383419
 REPORTED OBJECTIVE FUNCTION DOES NOT CONTAIN CONSTANT

 TOTAL EFFECTIVE ETAS (NIND*NETA):                           360


 #TERE:
 Elapsed estimation  time in seconds:    44.50
 Elapsed covariance  time in seconds:   185.30

 ********************               OBJECTIVE FUNCTION EVALUATION BY IMPORTANCE SAMPLING             ********************
 #OBJT:**************                        FINAL VALUE OF OBJECTIVE FUNCTION                       ********************
 #OBJV:********************************************    -1725.300       **************************************************

 ********************               OBJECTIVE FUNCTION EVALUATION BY IMPORTANCE SAMPLING             ********************
 ********************                             FINAL PARAMETER ESTIMATE                           ********************

 THETA - VECTOR OF FIXED EFFECTS PARAMETERS   *********
         TH 1      TH 2      TH 3      TH 4      TH 5
         7.82E-01  4.30E+00  2.44E+00  5.01E+00  2.12E+00

 OMEGA - COV MATRIX FOR RANDOM EFFECTS - ETAS  ********
         ETA1      ETA2      ETA3      ETA4      ETA5      ETA6      ETA7
 ETA1
+        0.00E+00
 ETA2
+        0.00E+00  1.78E-01
 ETA3
+        0.00E+00 -3.25E-02  3.18E-01
 ETA4
+        0.00E+00  0.00E+00  0.00E+00  0.00E+00
 ETA5
+        0.00E+00  0.00E+00  0.00E+00  0.00E+00  0.00E+00
 ETA6
+        0.00E+00  0.00E+00  0.00E+00  0.00E+00  0.00E+00  7.43E-01
 ETA7
+        0.00E+00  0.00E+00  0.00E+00  0.00E+00  0.00E+00  0.00E+00  7.43E-01

 SIGMA - COV MATRIX FOR RANDOM EFFECTS - EPSILONS  ****
         EPS1      EPS2
 EPS1
+        8.04E-02
 EPS2
+        0.00E+00  0.00E+00

 OMEGA - CORR MATRIX FOR RANDOM EFFECTS - ETAS  *******
         ETA1      ETA2      ETA3      ETA4      ETA5      ETA6      ETA7
 ETA1
+        0.00E+00
 ETA2
+        0.00E+00  4.22E-01
 ETA3
+        0.00E+00 -1.37E-01  5.64E-01
 ETA4
+        0.00E+00  0.00E+00  0.00E+00  0.00E+00
 ETA5
+        0.00E+00  0.00E+00  0.00E+00  0.00E+00  0.00E+00
 ETA6
+        0.00E+00  0.00E+00  0.00E+00  0.00E+00  0.00E+00  8.62E-01
 ETA7
+        0.00E+00  0.00E+00  0.00E+00  0.00E+00  0.00E+00  0.00E+00  8.62E-01

 SIGMA - CORR MATRIX FOR RANDOM EFFECTS - EPSILONS  ***
         EPS1      EPS2
 EPS1
+        2.83E-01
 EPS2
+        0.00E+00  0.00E+00

 ********************               OBJECTIVE FUNCTION EVALUATION BY IMPORTANCE SAMPLING             ********************
 ********************                         STANDARD ERROR OF ESTIMATE (RSR)                       ********************

 THETA - VECTOR OF FIXED EFFECTS PARAMETERS   *********
         TH 1      TH 2      TH 3      TH 4      TH 5
         6.72E-02  5.93E-02  9.75E-02  2.10E-01  5.93E-02

 OMEGA - COV MATRIX FOR RANDOM EFFECTS - ETAS  ********
         ETA1      ETA2      ETA3      ETA4      ETA5      ETA6      ETA7
 ETA1
+        0.00E+00
 ETA2
+        0.00E+00  3.15E-02
 ETA3
+        0.00E+00  2.59E-02  5.29E-02
 ETA4
+        0.00E+00  0.00E+00  0.00E+00  0.00E+00
 ETA5
+        0.00E+00  0.00E+00  0.00E+00  0.00E+00  0.00E+00
 ETA6
+        0.00E+00  0.00E+00  0.00E+00  0.00E+00  0.00E+00  4.53E-01
 ETA7
+        0.00E+00  0.00E+00  0.00E+00  0.00E+00  0.00E+00  0.00E+00  4.53E-01

 SIGMA - COV MATRIX FOR RANDOM EFFECTS - EPSILONS  ****
         EPS1      EPS2
 EPS1
+        5.43E-03
 EPS2
+        0.00E+00  0.00E+00

 OMEGA - CORR MATRIX FOR RANDOM EFFECTS - ETAS  *******
         ETA1      ETA2      ETA3      ETA4      ETA5      ETA6      ETA7
 ETA1
+       .........
 ETA2
+       .........  3.73E-02
 ETA3
+       .........  1.06E-01  4.69E-02
 ETA4
+       ......... ......... ......... .........
 ETA5
+       ......... ......... ......... ......... .........
 ETA6
+       ......... ......... ......... ......... .........  2.63E-01
 ETA7
+       ......... ......... ......... ......... ......... ......... .........

 SIGMA - CORR MATRIX FOR RANDOM EFFECTS - EPSILONS  ***
         EPS1      EPS2
 EPS1
+        9.57E-03
 EPS2
+       ......... .........
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
 ********************               OBJECTIVE FUNCTION EVALUATION BY IMPORTANCE SAMPLING             ********************
 ********************                   EIGENVALUES OF COR MATRIX OF ESTIMATE (RSR)                  ********************

             1         2         3         4         5         6         7         8         9        10
         1.73E-01  3.30E-01  5.06E-01  5.97E-01  6.57E-01  8.33E-01  1.09E+00  1.30E+00  1.60E+00  2.92E+00
 Elapsed postprocess time in seconds:     0.05
 Elapsed finaloutput time in seconds:     0.02
 #CPUT: Total CPU Time in Seconds,      311.987
